# Préparé dans le laboratoire «Diagnostic et Ingénierie des Procédés Industriels» (DIPI)
# Domashenkov A.
# M2, Doc 2013-2016
# Les paramètres de l'exérimentation:
P := 50  # W  # puissance de laser
v := 10  # cm/s  # vitesse de balayage
D := 1  # cm  # longueur de vecteur
d := 0.014  # cm  # distance de balayage
λ := 0.25  # W/cm ^0C  # conductivité thermique
a := 0.0683  # cm^2/s  # diffusivité thermique
c := 475  # J/ kg ^0C  # capacité thermique
N := 6  # nombre des pas
T_M := 1753  # ^0C  # point de fusion
A := 0.3  # coefficient d'absorption
z_0 := 0  # cm  # coordonnée Z d'un point
y_0 := 3*d = 0.042  # cm  # coordonnée Y d'un point
V_p := 300  # cm/s  # vitesse maximale du scanner
t_d := sqrt(d^2 + D^2)/V_p = 0.00333366  # s  # temps de retard
t_pr := t_d + D/v = 0.103334  # s  # temps du seul pas
t_tdt := (N + 1)*t_pr = 0.723336  # s  # temps de prosessus pour affichage en graphe
r := 0.0035  # cm  # radius du faisceau
T_i := 23  # ^0C  # température d'ambiance
h := 0.004  # cm  # épaisseur d'une couche
# Modèle de source  pointillé
T(z, y, t) := A*P/(2*π*λ*v*t)*e^(-(y^2 + z^2)/(4*a*t))
T_n(t, n, m) := A*P/(2*π*λ*v*(t - (n - 1)*t_pr))*e^(-((d*(n - 1) - y_0)^2 + (z_0 - m*h)^2)/(4*a*(t - (n - 1)*t_pr)))
B(t, n, m) := if(t > (n - 1)*t_pr, T_n(t, n, m), 0)
Sum(t, m) := sum(B(t, n, m), n = 1 .. N) + T_i
Sum1(t, m) := if(Sum(t, m) < T_M, Sum(t, m), T_M)
# Случай когда d=140um и y0=3*d
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# Слои №1 + №2
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# Случай когда d=70um и y0=3d
d := 0.007
y_0 := 3*d = 0.021
T_n(t, n, m) := A*P/(2*π*λ*v*(t - (n - 1)*t_pr))*e^(-((d*(n - 1) - y_0)^2 + (z_0 - m*h)^2)/(4*a*(t - (n - 1)*t_pr)))
B(t, n, m) := if(t > (n - 1)*t_pr, T_n(t, n, m), 0)
Sum(t, m) := sum(B(t, n, m), n = 1 .. N) + T_i
Sum1(t, m) := if(Sum(t, m) < T_M, Sum(t, m), T_M)
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# Случай когда d=70um и y0=2,5d
d := 0.007
y_0 := 2.5*d = 0.0175
T_n(t, n, m) := A*P/(2*π*λ*v*(t - (n - 1)*t_pr))*e^(-((d*(n - 1) - y_0)^2 + (z_0 - m*h)^2)/(4*a*(t - (n - 1)*t_pr)))
B(t, n, m) := if(t > (n - 1)*t_pr, T_n(t, n, m), 0)
Sum(t, m) := sum(B(t, n, m), n = 1 .. N) + T_i
Sum1(t, m) := if(Sum(t, m) < T_M, Sum(t, m), T_M)
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# Cooling rate for the chosen layer
C_rate(t, m) := d/dt(Sum1(t, m))
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# Modèle de source gaussienne
k := 1/r^2 → 81632.6530612  # coefficient de concentration
t_0 := 1/(4*a*k) → 4.48389458272e-5  # la durée de la source fictive
T_2(z_2, y_2, t) := 2*A*P/(v*λ)*e^(-z_2^2/(4*a*t))*e^(-y_2^2/(4*a*(t_0 + t)))/(sqrt(4*π*t)*sqrt(4*π*(t_0 + t)))
T_2n(t, n, m) := 2*A*P/(v*λ)*e^(-(z_0 - m*h)^2/(4*a*(t - (n - 1)*t_pr)))*e^(-(d*(n - 1) - y_0)^2/(4*a*(t_0 + (t - (n - 1)*t_pr))))/(sqrt(4*π*(t - (n - 1)*t_pr))*sqrt(4*π*(t_0 + (t - (n - 1)*t_pr))))
B_2(t, n, m) := if(t > (n - 1)*t_pr, T_2n(t, n, m), 0)
Sum_2(t, m) := sum(B_2(t, n, m), n = 1 .. N) + T_i
Sum1_2(t, m) := if(Sum_2(t, m) < T_M, Sum_2(t, m), T_M)
# Случай когда d=70um и y0=2.5d
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# Слои №1 + №2
# Случай когда d=70um и y0=3d
d := 0.007
y_0 := 3*d = 0.021
T_2n(t, n, m) := 2*A*P/(v*λ)*e^(-(z_0 - m*h)^2/(4*a*(t - (n - 1)*t_pr)))*e^(-(d*(n - 1) - y_0)^2/(4*a*(t_0 + (t - (n - 1)*t_pr))))/(sqrt(4*π*(t - (n - 1)*t_pr))*sqrt(4*π*(t_0 + (t - (n - 1)*t_pr))))
B_2(t, n, m) := if(t > (n - 1)*t_pr, T_2n(t, n, m), 0)
Sum_2(t, m) := sum(B_2(t, n, m), n = 1 .. N) + T_i
Sum1_2(t, m) := if(Sum_2(t, m) < T_M, Sum_2(t, m), T_M)
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# Случай когда d=140um и y0=3d
d := 0.014
y_0 := 3*d = 0.042
T_2n(t, n, m) := 2*A*P/(v*λ)*e^(-(z_0 - m*h)^2/(4*a*(t - (n - 1)*t_pr)))*e^(-(d*(n - 1) - y_0)^2/(4*a*(t_0 + (t - (n - 1)*t_pr))))/(sqrt(4*π*(t - (n - 1)*t_pr))*sqrt(4*π*(t_0 + (t - (n - 1)*t_pr))))
B_2(t, n, m) := if(t > (n - 1)*t_pr, T_2n(t, n, m), 0)
Sum_2(t, m) := sum(B_2(t, n, m), n = 1 .. N) + T_i
Sum1_2(t, m) := if(Sum_2(t, m) < T_M, Sum_2(t, m), T_M)
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# Vitesse de refroidissement du bain de fusion
Spr(t, m) := d/dt(Sum1(t, m))
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T_2(0, 0, t) → 0.954929658551/(sqrt(t)*sqrt(t + 4.48389458272e-5))
t_n := T_2(0, 0, t) == T_M solve, t → 0.00052278193292
T_izm(t) := d/dt(T(0, 0, t))
# Max value of the cooling rate
T_izm(t_n) → -3494059.06087  # ^0C/s
T(0, 0, z) == T_M solve → 0.000544740250172
T(x, y, z) := A*P/(2*π*λ*sqrt(x^2 + y^2 + z^2))*e^(-v*x/(2*a) - sqrt(x^2 + y^2 + z^2)/(2*a))
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T(0, 0, z) == T_M solve, z → -0.00524230779178
B(x, y, z) := A*P/(2*π*λ*sqrt(x^2 + y^2 + z^2))*e^(-v*x/(2*a) - sqrt(x^2 + y^2 + z^2)/(2*a)) == T_M
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# Calculation du bain de fusion
x_1 := 0.0002  # в окрестности какой точки искать минимум функции
# source  pointillé | source  gaussienne
z(x) := -2*sqrt(a*(x/v)*ln(A*P/(2*π*v*T_M*λ*(x/v))))
z_2(y, t) := -sqrt(t*(4*a*(t + t_0)*ln(A*2*P/(4*π*v*T_M*λ*sqrt(t*(t_0 + t)))) - y^2))/sqrt(t + t_0)
z_22(t) := z_2(0, t)
x_max := Minimize(z, x_1) = 0.00200399
t_2max := Minimize(z_22, x_1) = 0.000198464
z(x_max) = -0.00739925  # см
z_22(t_2max) = -0.00701598  # см
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# source  gaussienne, largeur de bain
y(z, t) := -sqrt(4*a*(t + t_0)*ln(A*2*P/(4*π*v*T_M*λ*sqrt(t*(t_0 + t)))) - (t + t_0)*z^2/t)
y_22(t) := y(0, t)
t_3max := Minimize(y_22, x_1) = 0.000151934
y_22(t_3max) = -0.00785436
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δ := d
α := 0.1454  # Fabrication d'une mur mince
b := 2*α*a/(λ*δ)
T_p(x, z) := 2*A*P/(2*π*λ*δ)*K0(sqrt(x^2 + z^2)*sqrt(b/a + v^2/(4*a^2)))*e^(-(v*x)/(2*a))
M := CreateMesh(T_p, -2.5, 1.5, -1.5, 1.5, 60, 60)
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# [component: inputs M]
M1 := CreateMesh(T_p, -0.008, 0.008, 0, 0.008, 300, 300)
# [component: inputs M1]
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D := 1
x := 0.5
z := -0.005
ts := 0.004  # cm  # hauteur de la couche
N := 6
t_d := 0.01  # s  # temps de retard
t_pr := t_d + D/v = 0.11
t_tdt := (N + 3)*t_pr = 0.99
T4(t, n) := 2*A*P/(2*π*λ*δ)*K0(sqrt((x - v*(t - (n - 1)*t_pr))^2 + (z - ts*n)^2)*sqrt(b/a + v^2/(4*a^2)))*e^(-(v*(x - v*(t - (n - 1)*t_pr)))/(2*a))
B1(t, n) := if(t > (n - 1)*t_pr, T4(t, n), 0)
Sum4(t) := sum(B1(t, n), n = 1 .. N)
Sum41(t) := if(Sum4(t) < T_M, Sum4(t), T_M)
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