KX(x, y, z, t) := integral((2*50/(0.1/0.05*(4*π*0.06*(t - t1))^(1/2)*(4*π*0.06*(0.01 + t - t1))))*e^((-z^2/(4*0.06*(t - t1))) - ((x - 7*t1)^2 + y^2)/(4*0.06*(0.01 + t - t1))), t1 = 0 .. t)
T2(x, y, t) := if(KX(x, y, 0, t) < 1000, KX(x, y, 0, t), 1000)
T1(x, y) := T2(x, y, 0.0031423)
T4(x, y) := KX(x, y, 0, 0.0231423)
M1 := CreateMesh(T1, -0.04, 0.2, -0.06, 0.06, 80, 80)
# [component: inputs M1]
