# Préparée dans le laboratoire «Diagnostic et Ingénierie des Procédés Industriels» (DIPI)
# Domashenkov A.
# M2 2013
# Les paramètres de l'exérimentation:
P := 60  # W  # puissance de laser
v := 10  # cm/s  # vitesse de balayage
D := 1  # cm  # longueur de vecteur
d := 0.007  # cm  # distance de balayage
λ := 0.0748  # W/cm ^0C  # conductivité thermique
c := 377  # J/ kg ^0C  # capacité thermique
ρ := 8.8  # g/cm^3  # densite
a := 1000*λ/(c*ρ) = 0.0225464  # cm^2/s  # diffusivité thermique
N := 6  # nombre des pas
T_M := 1040  # ^0C  # point de fusion
A := 0.05  # coefficient d'absorption
z_0 := 0  # coordonnée Z d'un point
y_0 := 3*d = 0.021  # coordonnée Y d'un point
t_d := 0.01  # s  # temps de retard
t_pr := t_d + D/v = 0.11  # s  # temps du seul pas
t_tdt := (N + 1)*t_pr = 0.77  # s  # temps de prosessus
r := 0.0035  # cm  # radius de faisceau de laser
T_i := 23  # ^0C  # température dans la chambre de fusion
h := 0.004  # cm  # hauteur de la couche
# Modèle de source  pointillé
T(z, y, t) := A*P/(2*π*λ*v*t)*e^(-(y^2 + z^2)/(4*a*t))
T_n(t, n, m) := A*P/(2*π*λ*v*(t - (n - 1)*t_pr))*e^(-((d*(n - 1) - y_0)^2 + (z_0 + m*h)^2)/(4*a*(t - (n - 1)*t_pr)))
B(t, n, m) := if(t > (n - 1)*t_pr, T_n(t, n, m), 0)
Sum(t, m) := sum(B(t, n, m), n = 1 .. N) + T_i
Sum1(t, m) := if(Sum(t, m) < T_M, Sum(t, m), T_M)
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Spr(t, n) := d/dt(Sum1(t, 0))
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# Modèle de source gaussienne
k := 1/r^2 → 81632.6530612  # coefficient de concentration
t_0 := 1/(4*a*k) → 0.000135830882353  # la durée de la source fictive
T_2n(t, n, m) := 2*A*P/(v*λ)*e^(-(z_0 + m*h)^2/(4*a*(t - (n - 1)*t_pr)))*e^(-(d*(n - 1) - y_0)^2/(4*a*(t_0 + (t - (n - 1)*t_pr))))/(sqrt(4*π*(t - (n - 1)*t_pr))*sqrt(4*π*(t_0 + (t - (n - 1)*t_pr))))
T_2(z_2, y_2, t) := 2*A*P/(v*λ)*e^(-z_2^2/(4*a*t))*e^(-y_2^2/(4*a*(t_0 + t)))/(sqrt(4*π*t)*sqrt(4*π*(t_0 + t)))
B_2(t, n, m) := if(t > (n - 1)*t_pr, T_2n(t, n, m), 0)
Sum_2(t, m) := sum(B_2(t, n, m), n = 1 .. N) + T_i
Sum1_2(t, m) := if(Sum_2(t, m) < T_M, Sum_2(t, m), T_M)
d/dt(T_2n(t, n))
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# Vitesse de refroidissement du bain de fusion
T_2(0, 0, t) → 0.638321964272/(sqrt(t)*sqrt(t + 0.000135830882353))
t_n := T_2(0, 0, t) == T_M solve, t → 0.000549601760425
T_izm(t) := d/dt(T_2(0, 0, t))
T_izm(t_n) → -1704784.54964  # ^0C/s
# Calculation du bain de fusion
t_1 := 0.0002  # в окрестности какой точки искать минимум функции
# source  pointillé | source  gaussienne
z(t) := -2*sqrt(a*t*ln(A*P/(2*π*v*T_M*λ*t)))
z_2(y, t) := -sqrt(t*(4*a*(t + t_0)*ln(A*2*P/(4*π*v*T_M*λ*sqrt(t*(t_0 + t)))) - y^2))/sqrt(t + t_0)
t_max := Minimize(z, t_1) = 0.000225794
z_22(t) := z_2(0, t)
z(t_max) = -0.00451258  # см
t_2max := Minimize(z_22, t_1) = 0.000214474
z_22(t_2max) = -0.00394873  # см
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# source  gaussienne, largeur de bain
y(z, t) := -sqrt(4*a*(t + t_0)*ln(A*2*P/(4*π*v*T_M*λ*sqrt(t*(t_0 + t)))) - (t + t_0)*z^2/t)
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y_22(t) := y(0, t)
t_3max := Minimize(y_22, t_1) = 1.11022e-20
y_22(t_3max) = -0.0156641
# Fabrication de la paroi mince
δ := d
α := 0.1454
b := 2*α*a/(λ*δ)
T_p(x, z) := 2*A*P/(2*π*λ*δ)*K0(sqrt(x^2 + z^2)*sqrt(b/a + v^2/(4*a^2)))*e^(-(v*x)/(2*a))
M := CreateMesh(T_p, -2.5, 1.5, -1.5, 1.5, 60, 60)
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# [component: inputs M]
M1 := CreateMesh(T_p, -0.04, 0.01, 0, 0.03, 300, 300)
# [component: inputs M1]
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D := 1
x := 0.5
z := 0.005
ts := 0.004  # cm  # hauteur de la couche
N := 7
t_d := 0.01  # s  # temps de retard
t_pr := t_d + D/v = 0.11
t_tdt := (N + 3)*t_pr = 1.1
T4(t, n) := 2*A*P/(2*π*λ*δ)*K0(sqrt((x - v*(t - (n - 1)*t_pr))^2 + (ts*n + z)^2)*sqrt(b/a + v^2/(4*a^2)))*e^(-(v*(x - v*(t - (n - 1)*t_pr)))/(2*a))
B1(t, n) := if(t > (n - 1)*t_pr, T4(t, n), 0)
Sum4(t) := sum(B1(t, n), n = 1 .. N)
Sum41(t) := if(Sum4(t) < T_M, Sum4(t), T_M)
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