# Les paramètres de l'exérimentation:
P := 50  # W
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v := 8  # cm/s
D := 1  # cm
d := 0.007  # cm
λ := 0.249  # W/cm ^0C
a := 0.0703  # cm^2/s
c := 460  # J/ kg ^0C
L_M := 270*10^3  # J/kg
N := 10  # nombre des pas
T_M := 1753  # ^0C
A := 0.3  # coefficient d'absorption
z_0 := 0  # coordonnée Z d'un point
y_0 := 5/2*d = 0.0175  # coordonnée Y d'un point
t_pr := D/v = 0.125  # s  # время, необходимое для одного прохода
t_tdt := (N + 1)*t_pr = 1.375  # s  # время процесса
r := 0.0035  # cm  # radius de faisceau de laser
k := 1/r^2 → 81632.6530612
t_0 := 1/(4*a*k) → 4.35633001422e-5
T(z, y, t) := A*P/(2*π*λ*v*t)*e^(-(y^2 + z^2)/(4*a*t))
T_2(z_2, y_2, t) := 2*A*P/(v*λ)*e^(-z_2^2/(4*a*t))*e^(-y_2^2/(4*a*(t_0 + t)))/(sqrt(4*π*t)*sqrt(4*π*(t_0 + t)))
Td(z, t) := T(z, 0, t)
T3(x, z) := A*P/(2*π*v*λ*sqrt(x^2 + z^2))*e^(-v*x/(2*a) - v*sqrt(x^2 + z^2)/(2*a))
T(z, y, t) == T_M solve, z → [
    -0.1406*sqrt(-50.5858857285*y^2 - 103.670695724*t - 14.2247510669*t*ln(t));
    0.1406*sqrt(-50.5858857285*y^2 - 103.670695724*t - 14.2247510669*t*ln(t))
]
J(x, z) := T3(x, z) == 1400
G1(y_2, t) := T_2(z_2, y_2, t) == T_M solve, z_2 → [
    -0.530282943343i*sqrt(t)*sqrt(ln(1462.71548641*sqrt(t)*e^(y_2^2/(0.2812*t + 0.00001225))*sqrt(t + 4.35633001422e-5)));
    0.530282943343i*sqrt(t)*sqrt(ln(1462.71548641*sqrt(t)*e^(y_2^2/(0.2812*t + 0.00001225))*sqrt(t + 4.35633001422e-5)))
]
M0 := CreateMesh(Td, -0.5, 1, 0.1, 1.5, 50, 50)
G2(y, t) := 0.1406*sqrt(-50.5858857285*y^2 - 103.670695724*t - 14.2247510669*t*ln(t))
G3(t) := G2(0, t)
M10 := CreateMesh(G3, -2.5, 1.5, 0.1, 1.5, 60, 60)  # error: Эта функция имеет форму: ƒ(Unitless) → Unitless, а должна иметь форму: ƒ(Unitless, Unitless) → Unitless.
# [component: inputs M0]
# [component: inputs M0]
# [component: inputs M0]
δ := d
α := 0.1454
b := 2*α*a/(λ*δ)
b = 11.7288
T_p(x, z) := 2*A*P/(2*π*λ*δ)*K0(sqrt(x^2 + z^2)*sqrt(b/a + v^2/(4*a^2)))*e^(-(v*x)/(2*a))
T1(x, z) := if(T_p(x, z) == T_M, T_p(x, z), 0)
M := CreateMesh(T_p, -2.5, 1.5, -1.5, 1.5, 60, 60)
T_p(x, z) → 2739.32776406*e^(-56.8990042674*x)*K0(58.3466834561*sqrt(x^2 + z^2))
K := if(M > T_M, T_M, T_M)  # error: Эти значения нельзя сравнить.
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# [component: inputs M]
M1 := CreateMesh(T_p, -0.14, 0.02, 0, 0.08, 300, 300)
# [component: inputs M1]
