# Préparé dans le laboratoire «Diagnostic et Ingénierie des Procédés Industriels» (DIPI)
# Domashenkov A.
# M2, Doc 2013-2016
# Les paramètres de l'exérimentation:
P := 100  # W  # puissance de laser
v := 7  # cm/s  # vitesse de balayage
D := 0.35  # cm  # longueur de vecteur
d := 0.009  # cm  # distance de balayage
λ := 0.13  # W/cm ^0C  # conductivité thermique
a := 0.055  # cm^2/s  # diffusivité thermique
c := 601  # J/ kg ^0C  # capacité thermique
N := 10  # nombre des passages
T_M := 1460  # ^0C  # point de fusion
A := 0.4  # coefficient d'absorption
z_0 := 0  # cm  # coordonnée Z d'un point
y_0 := 4*d = 0.036  # cm  # coordonnée Y d'un point
x_0 := D/2 = 0.175  # cm
V_p := 700  # cm/s  # vitesse maximale du scanner
t_d := sqrt(d^2 + D^2)/V_p = 0.000500165  # s  # temps de retard
t_pr := t_d + D/v = 0.0505002  # s  # temps du seul pas
t_tdt := (N + 1)*t_pr = 0.555502  # s  # temps de prosessus pour affichage en graphe
r := 0.0075  # cm  # radius du faisceau
T_i := 23  # ^0C  # température d'ambiance
h := 0.006  # cm  # épaisseur d'une couche
# Modèle de source  pointillé
T(z, y, t) := A*P/(2*π*λ*v*t)*e^(-(y^2 + z^2)/(4*a*t))
T_n(t, n, m) := A*P/(2*π*λ*v*(t - (n - 1)*t_pr))*e^(-((d*(n - 1) - y_0)^2 + (z_0 - m*h)^2)/(4*a*(t - (n - 1)*t_pr)))
B(t, n, m) := if(t > (n - 1)*t_pr, T_n(t, n, m), 0)
Sum(t, m) := sum(B(t, n, m), n = 1 .. N) + T_i
Sum1(t, m) := if(Sum(t, m) < T_M, Sum(t, m), T_M)
# [plot: T_M, Sum1(t, 0), Sum1(t, 2) vs t]
x(y) := y
Buk(y) := if(y > 2, x(y), 0)
# [plot: Buk(y), x(y) vs y]
T_n(t, n, m) := A*P/(2*π*λ*v*(t - (n - 1)*t_pr))*e^(-((d*(n - 1) - y_0)^2 + (z_0 - m*h)^2)/(4*a*(t - (n - 1)*t_pr)))
B(t, n, m) := if(t > (n - 1)*t_pr, T_n(t, n, m), 0)
Sum(t, m) := sum(B(t, n, m), n = 1 .. N) + T_i
Sum1(t, m) := if(Sum(t, m) < T_M, Sum(t, m), T_M)
T_n(t, n, m) := A*P/(2*π*λ*v*(t - (n - 1)*t_pr))*e^(-((d*(n - 1) - y_0)^2 + (z_0 - m*h)^2)/(4*a*(t - (n - 1)*t_pr)))
B(t, n, m) := if(t > (n - 1)*t_pr, T_n(t, n, m), 0)
Sum(t, m) := sum(B(t, n, m), n = 1 .. N) + T_i
Sum1(t, m) := if(Sum(t, m) < T_M, Sum(t, m), T_M)
# Cooling rate for the chosen layer
C_rate(t, m) := d/dt(Sum1(t, m))
# [plot: C_rate(t, 0) vs t]
# Modèle de source gaussienne
k := 1/r^2 → 17777.7777778  # coefficient de concentration
t_0 := 1/(4*a*k) → 0.000255681818182  # la durée de la source fictive
T_2(z_2, y_2, t) := A*P/(v*λ)*e^(-z_2^2/(4*a*t))*e^(-y_2^2/(4*a*(t_0 + t)))/(sqrt(2*π*t)*sqrt(2*π*(t_0 + t)))
x_0 := 0
y_0 := 4.5*d
z_0 := 0
KX(x, y, z, t) := integral((2*A*P/(λ/a*(4*π*a*(t - t1))^(1/2)*(4*π*a*(t_0 + t - t1))))*e^((-z^2/(4*a*(t - t1))) - ((x - v*t1)^2 + y^2)/(4*a*(t_0 + t - t1))), t1 = 0 .. t)
KX_1(y, t) := KX(0, y, 0, t)
KX(0.00005) =  # error: This function requires at least {0} arguments but is applied to {1}.
FX(t, n, m) := integral((2*A*P/(λ/a*(4*π*a*((t - (n - 1)*t_pr) - (t1 - (n - 1)*t_pr)))^(1/2)*(4*π*a*(t_0 + (t - (n - 1)*t_pr) - (t1 - (n - 1)*t_pr)))))*e^((-(z_0 - m*h)^2/(4*a*((t - (n - 1)*t_pr) - (t1 - (n - 1)*t_pr)))) - ((x_0 - v*(t1 - (n - 1)*t_pr))^2 + (d*(n - 1) - y_0)^2)/(4*a*(t_0 + (t - (n - 1)*t_pr) - (t1 - (n - 1)*t_pr)))), t1 = 0 .. t)
FX(0.00005, 1, 0) = 9.93841e-9
# [plot: T_M, FX(t, 3, 0) vs t]
T_2n(t, n, m) := A*P/(v*λ)*e^(-(z_0 - m*h)^2/(4*a*(t - (n - 1)*t_pr)))*e^(-(d*(n - 1) - y_0)^2/(4*a*(t_0 + (t - (n - 1)*t_pr))))/(sqrt(2*π*(t - (n - 1)*t_pr))*sqrt(2*π*(t_0 + (t - (n - 1)*t_pr))))
B_2(t, n, m) := if(t > (n - 1)*t_pr, T_2n(t, n, m), 0)
B_3(t, n, m) := if(t > (n - 1)*t_pr, FX(t, n, m), 0)
Sum_2(t, m) := sum(B_2(t, n, m), n = 1 .. N) + T_i
Sum_3(t, m) := sum(B_3(t, n, m), n = 1 .. N) + T_i
Sum1_2(t, m) := if(Sum_2(t, m) < T_M, Sum_2(t, m), T_M)
Sum1_3(t, m) := if(Sum_2(t, m) < T_M, Sum_3(t, m), T_M)
T_2n(t, n, m) := 2*A*P/(v*λ)*e^(-(z_0 - m*h)^2/(4*a*(t - (n - 1)*t_pr)))*e^(-(d*(n - 1) - y_0)^2/(4*a*(t_0 + (t - (n - 1)*t_pr))))/(sqrt(4*π*(t - (n - 1)*t_pr))*sqrt(4*π*(t_0 + (t - (n - 1)*t_pr))))
B_2(t, n, m) := if(t > (n - 1)*t_pr, T_2n(t, n, m), 0)
Sum_2(t, m) := sum(B_2(t, n, m), n = 1 .. N) + T_i
Sum1_2(t, m) := if(Sum_2(t, m) < T_M, Sum_2(t, m), T_M)
B_3(0.00039424, 1, 0)
# [plot: T_M, Sum1_3(t, 0) vs t]
T_2n(t, n, m) := 2*A*P/(v*λ)*e^(-(z_0 - m*h)^2/(4*a*(t - (n - 1)*t_pr)))*e^(-(d*(n - 1) - y_0)^2/(4*a*(t_0 + (t - (n - 1)*t_pr))))/(sqrt(4*π*(t - (n - 1)*t_pr))*sqrt(4*π*(t_0 + (t - (n - 1)*t_pr))))
B_2(t, n, m) := if(t > (n - 1)*t_pr, T_2n(t, n, m), 0)
Sum_2(t, m) := sum(B_2(t, n, m), n = 1 .. N) + T_i
Sum1_2(t, m) := if(Sum_2(t, m) < T_M, Sum_2(t, m), T_M)
M := CreateMesh(KX_1, -2.5, 1.5, -1.5, 1.5, 60, 60)  # error: The calculation is not converging to a solution. Please refer to Help for additional information.
# [3D plot: CreateMesh(KX_1, 21)]
# Vitesse de refroidissement du bain de fusion
Spr(t, m) := d/dt(Sum1_3(t, m))
KX(0, 0, 0.001, t)  # no stored result; disabled
t_n := KX(0, 0, 0, t) == T_M solve, t →  # disabled
T_izm(t) := d/dt(T_2(0, 0, t))
# Max value of the cooling rate
T_izm(0.0001875736) → -(9.20410888479*10^7)
Sum1_3(0.006, 0) = 131.702
# ^0C/s
# [plot: Spr(t, 0) vs t]
T(0, 0, z) == T_M solve → 0.00479165868107
T(x, y, z) := A*P/(2*π*λ*sqrt(x^2 + y^2 + z^2))*e^(-v*x/(2*a) - sqrt(x^2 + y^2 + z^2)/(2*a))
# [plot: T(0, 0, z) vs z]
T(0, 0, z) == T_M solve, z → -0.0263877129014
B(x, y, z) := A*P/(2*π*λ*sqrt(x^2 + y^2 + z^2))*e^(-v*x/(2*a) - sqrt(x^2 + y^2 + z^2)/(2*a)) == T_M
# [plot: B(x, 0) vs x]
# Calculation du bain de fusion
x_1 := 0.0002  # в окрестности какой точки искать минимум функции
# source  pointillé | source  gaussienne
z(x) := -2*sqrt(a*(x/v)*ln(A*P/(2*π*v*T_M*λ*(x/v))))
z_2(y, t) := -sqrt(t*(4*a*(t + t_0)*ln(A*2*P/(4*π*v*T_M*λ*sqrt(t*(t_0 + t)))) - y^2))/sqrt(t + t_0)
z_22(t) := z_2(0, t)
x_max := Minimize(z, x_1) = 0.0123393
t_2max := Minimize(z_22, x_1) = 0.0002
z(x_max) = -0.0196928  # см
z_22(t_2max) = -0.0110291  # см
# [plot: z(x), z_2(0, x) vs x]
# [plot: z_2(0, t), z_2(0.002, t), z_2(0.004, t), z_2(0.005, t) vs t]
# source  gaussienne, largeur de bain
y(z, t) := -sqrt(4*a*(t + t_0)*ln(A*2*P/(4*π*v*T_M*λ*sqrt(t*(t_0 + t)))) - (t + t_0)*z^2/t)
y_22(t) := y(0, t)
t_3max := Minimize(y_22, x_1) = 0.0002
y_22(t_3max) = -0.0166478
# [plot: y(0, t), y(0.001, t), y(0.003, t), y(0.004, t) vs t]
# Fabrication d'une mur mince
δ := d
α := 0.1454
b := 2*α*a/(λ*δ)
T_p(x, z) := 2*A*P/(2*π*λ*δ)*K0(sqrt(x^2 + z^2)*sqrt(b/a + v^2/(4*a^2)))*e^(-(v*x)/(2*a))
M := CreateMesh(T_p, -2.5, 1.5, -1.5, 1.5, 60, 60)
# [plot: T_p(x, 0.001), T_p(x, 0.01), T_p(x, 0.08), T_p(x, 0.12), T_p(x, 0.17), T_p(x, 0.24) vs x]
# [3D plot: M]
M1 := CreateMesh(T_p, -0.008, 0.008, 0, 0.008, 300, 300)
# [contour plot: M1]
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D := 1
x := 0.5
z := -0.005
ts := 0.004  # cm  # hauteur de la couche
N := 6
t_d := 0.01  # s  # temps de retard
t_pr := t_d + D/v = 0.152857
t_tdt := (N + 3)*t_pr = 1.37571
T4(t, n) := 2*A*P/(2*π*λ*δ)*K0(sqrt((x - v*(t - (n - 1)*t_pr))^2 + (z - ts*n)^2)*sqrt(b/a + v^2/(4*a^2)))*e^(-(v*(x - v*(t - (n - 1)*t_pr)))/(2*a))
B1(t, n) := if(t > (n - 1)*t_pr, T4(t, n), 0)
Sum4(t) := sum(B1(t, n), n = 1 .. N)
Sum41(t) := if(Sum4(t) < T_M, Sum4(t), T_M)
# [plot: Sum41(t) vs t]
